# Udregninger til Step down converter
6*(5 V + 0.8 V)/(100*10^-6*A) = 348000 Ω
# Udregninger til cut off frekvenser
500 Hz == 1/(2*π*100*nF*R) solve, R → 1/(100000*π*Hz*nF) = 3183.1 Ω
# Vælges til 3.3 kΩ, grundedt e24 række og derved fremkommer
1/(2*π*100*nF*3.3*kΩ) = 482.288 1/s
